*Heading
** Job name: U_elastic_mesh_only Model name: Model-1
** Generated by: Abaqus/CAE 2018
*Preprint, echo=NO, model=NO, history=NO, contact=NO
** ----------------------------------------------------------------
**
** PART INSTANCE: U_elastic
**
*Node
      1,          20.,          20.,           0.
      2,          30.,          20.,           0.
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*Element, type=C3D8
  1,  173, 1138, 3463, 1018,    1,   79,  915,   89
  2, 1138, 1139, 3464, 3463,   79,   80,  916,  915
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*System
*Nset, nset=all, generate
    1,  5898,     1
*Elset, elset=all, generate
    1,  4320,     1
*Nset, nset=left
  44,  45,  56,  58, 641, 642, 643, 735, 736, 737, 738
*Elset, elset=left
 3260, 3265, 3270, 3275, 3526, 3546
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*Nset, nset=left_lower_datum
  25,  27, 272
*Elset, elset=left_lower_datum
  474,  475,  499,  500, 2946, 2947, 2951, 2952
*Nset, nset=left_upper_datum
  26,  28, 284
*Elset, elset=left_upper_datum
  724,  725,  749,  750, 2996, 2997, 3001, 3002
*Nset, nset=midplane_xy
    9,   10,   21,   22,   29,   30
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*Elset, elset=midplane_xy
  801,  802,  803,  804,  805,  826
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*Nset, nset=right
  38,  39,  47,  48, 579, 580, 581, 666, 667, 668, 669
*Elset, elset=right
 2880, 2885, 2890, 2895, 3351, 3352
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*Nset, nset=right_lower_datum
  3,  4, 87
*Elset, elset=right_lower_datum
   14,   15,   19,   20, 2856, 2857, 2861, 2862
*Nset, nset=right_upper_datum
   6,   8, 119
*Elset, elset=right_upper_datum
   64,   65,   69,   70, 2806, 2807, 2811, 2812
*Elset, elset=_left_inner_S2, generate
 3611,  3626,     1
*Elset, elset=_left_inner_S6, generate
 3256,  3331,     5
*Surface, type=ELEMENT, name=left_inner
_left_inner_S2, S2
_left_inner_S6, S6
*Elset, elset=_left_outer_S1, generate
 3675,  3690,     1
*Elset, elset=_left_outer_S4, generate
 3260,  3335,     5
*Surface, type=ELEMENT, name=left_outer
_left_outer_S1, S1
_left_outer_S4, S4
*Elset, elset=_right_inner_S2, generate
 3891,  3906,     1
*Elset, elset=_right_inner_S6, generate
 2876,  2931,     5
*Surface, type=ELEMENT, name=right_inner
_right_inner_S2, S2
_right_inner_S6, S6
*Elset, elset=_right_outer_S1, generate
 3955,  3970,     1
*Elset, elset=_right_outer_S4, generate
 2880,  2935,     5
*Surface, type=ELEMENT, name=right_outer
_right_outer_S1, S1
_right_outer_S4, S4

*solid section, elset=all, material=S355
**Properties for S355 are here:
**https://www.sciencedirect.com/science/article/pii/S0141029616301249
*material, name=S355
*elastic, type=iso
2.05E5,0.3
*step
*static
*boundary
left, 1,1,0.600000
left, 2,2,
right, 1,1,-0.600000
right, 2,2,
midplane_xy, 3,3,
*node file
U
*el file
S
*node print, nset=left_lower_datum
U
*node print, nset=left_upper_datum
U
*node print, nset=right_upper_datum
U
*node print, nset=right_lower_datum
U
*el print, elset=all
S
*endstep
